! ---------------------------------------------------------------------------------
! TRIANGLE LIFTER - kassow arm
! ...............................................................
! DETERMINATION OF MAXIMUM DISPLACEMENT AND STRESS
! ---------------------------------------------------------------------------------

FINISH
/CLEAR, START, NEW
/FILNAM,TRIANGLE_LIFTER
/TITLE,TRIANGLE LIFTER

! >>>>> MODEL PARAMETERS <<<<<

L1 = 444 	! Link length
S = 17		! Distance from front and back link
B = 35		! Section thickness of the link
H = 13		! Section hight of the link
SL_th = 0.8	! Spiral lifter thickness
R2 = 75/2	! Outer radius of the spiral lift
R1 = R2 - SL_th	! Inner radius of the spiral lift
B_L = 15	! Section thickness of the edge link
H_L = 30	! Section hight of the edge link
TH_plate = 6	! Top plate thickness
W1 = 13
W2 = 13
W3 = 35
t1 = 5.5
t2 = 5.5
t3 = 5
PS = 30		! Top Plate Shift
HP = 1552		! Platform height

! Worst static case
W_KASSOW = 40*9.81	! Robot total weight force
C_KASSOW = 620		! CoM of the robot
F_KASSOW = 5*9.81	! End effector payload
L_KASSOW = 1850		! End effector extension

! Datasheet load
F_DS = 1000	! N
M_DS = 500000	! Nmm

x_shift = -5.25
z_shift = -19.593
N = 6		! Number of stages


*AFUN, DEG				! To set the angles in degrees
alpha = ASIN((HP-PS-TH_plate)/N/L1)	! Inclination angle of links wrt horizontal plane
beta_os = 30				! Beta offset to get the reference position along the symmetry line
beta = 0				! Angle at which the momentum is applied (wrt y axis of csys,0)

x1 = L1/2*COS(alpha)
y1 = L1/2*SIN(alpha)
x2 = L1*COS(alpha)
y2 = L1*SIN(alpha)

! >>>>> MATERIAL PROPERTIES <<<<<

E_al = 57500		! Aluminum 6082 Young modulus (MPa) 68900 57500
ni_al = 0.33		! Aluminum 6082 Poisson's ratio (-)
Density_al = 2.7e-6	! Aluminum 6082 density (Kg/mm3)

E_ss = 193000 	 	! Stainless steel 301 Young's modulus (MPa) 193000
ni_ss = 0.27		! Stainless steel 301 Poisson's ratio (-)
Density_ss = 7.88e-6	! Stainless steel 301 density (Kg/mm3)

! >>>>> OTHER PARAMETERS <<<<<

E_length = 20		! Element length (mm) 10
E_plate = 10		! Top plate element size (mm) 10
eps = 1E-4		! Selection tolerance
eps_2 = S + 1 		! Selection tolerance for links

/PREP7

! Types of elements
ET,1,BEAM189		! Structure beams
ET,2,184,1,1		! Rigid beams
ET,3,SHELL181  		! Top plate

!cross-sectional data of links
SECTYPE,1,BEAM,RECT, link
SECDATA,B,H

!cross-sectional data of spiral lift
SECTYPE,2,BEAM,CTUBE, spiral
SECDATA,R1,R2

!cross-sectional data of edge links
SECTYPE,3,BEAM,RECT, edge
SECDATA,B_L,H_L

!cross-sectional data of top plate
SECTYPE,4,SHELL
SECDATA,TH_plate

!cross-sectional data of links
SECTYPE,5,BEAM,CHAN, C_link
SECDATA,W1,W2,W3,t1,t2,t3

!cross-sectional data of profile beam to apply load
SECTYPE,6,BEAM,RECT, beam
SECDATA,80,40

! Coordinate systems definition
LOCAL, 11, 0, -19.593, , -33.937, 0, 0, 60							! Coordinate system of the second side
LOCAL, 12, 0, 19.593 + x2, , -33.937, 0, 0, 120							! Coordinate system of the third side
LOCAL, 13, 0,,,-22.624, 0, 0, -60								! Coordinate system of the first edge
LOCAL, 14, 0,195.053*SIN(60),y2*N+PS+TH_plate+40,-22.624-195.053*COS(60),0,0,beta_os+beta	! Coordinate system of the arm

! Aluminum 6082 properties
MP, EX  , 1, E_al
MP, PRXY, 1, ni_al
MP, dens, 1, Density_al

! Stainless steel 316L properties
MP, EX  , 2, E_ss
MP, PRXY, 2, ni_ss
MP, dens, 2, Density_ss

! Stainless steel 316L properties
MP, EX  , 3, E_ss
MP, PRXY, 3, ni_ss
MP, dens, 3, 0

! >>>>> SIDE 1 <<<<<

csys, 0

*DO, i, 1, N,1

K,700, 0 , 2000, 0
K,750, x2, - 2000, S

inc_K = (i-1)*6
inc_y = (i-1)*y2
inc_L = (i-1)*6
inc_mesh = (i-1)*4

K, 1 + inc_K, 0 , 0  + inc_y, 0
K, 2 + inc_K, x1, y1 + inc_y, 0
K, 3 + inc_K, x2, y2 + inc_y, 0
L, 1 + inc_L, 2 + inc_L
L, 2 + inc_L, 3 + inc_L
LESIZE, all,E_length
LATT,1,,1,,700,,5
LMESH, 1 + inc_mesh, 2 + inc_mesh
Lsel,u,line,,all

K, 4 + inc_K, x2, 0  + inc_y, S
K, 5 + inc_K, x1, y1 + inc_y, S
K, 6 + inc_K, 0 , y2 + inc_y, S
L, 4 + inc_L, 5 + inc_L
L, 5 + inc_L, 6 + inc_L
LESIZE, all,E_length
LATT,1,,1,,750,,5
LMESH, 3 + inc_mesh, 4 + inc_mesh
Lsel,u,line,,all

*ENDDO

!Internal pins - SIDE 1
NSEL, S, LOC, X, - eps, esp
NSEL, A, LOC, X, x1 - eps, x1 + esp
NSEL, A, LOC, X, x2 - eps, x2 + esp
CPINTF,ux,eps_2
CPINTF,uy,eps_2
CPINTF,uz,eps_2
CPINTF,rotx,eps_2
CPINTF,roty,eps_2

! >>>>> SIDE 2 <<<<<

csys, 11

*DO, i, 1, N,1

K,500, 0 , - 2000, -S
K,550, x2, 2000, 0

inc_side = 6*N
inc_K = (i-1)*6
inc_y = (i-1)*y2
inc_L = (i-1)*6
inc_mesh = (i-1)*4
inc_side_m = 4*N

K, 1 + inc_K + inc_side, x2, 0  + inc_y, 0
K, 2 + inc_K + inc_side, x1, y1 + inc_y, 0
K, 3 + inc_K + inc_side, 0 , y2 + inc_y, 0
L, 1 + inc_L + inc_side, 2 + inc_L + inc_side
L, 2 + inc_L + inc_side, 3 + inc_L + inc_side
LESIZE, all,E_length
LATT,1,,1,,550,,5
LMESH, 1 + inc_mesh + inc_side_m, 2 + inc_mesh + inc_side_m
Lsel,u,line,,all

K, 4 + inc_K + inc_side, 0 , 0  + inc_y, -S
K, 5 + inc_K + inc_side, x1, y1 + inc_y, -S
K, 6 + inc_K + inc_side, x2, y2 + inc_y, -S
L, 4 + inc_L + inc_side, 5 + inc_L + inc_side
L, 5 + inc_L + inc_side, 6 + inc_L + inc_side
LESIZE, all,E_length
LATT,1,,1,,500,,5
LMESH, 3 + inc_mesh + inc_side_m, 4 + inc_mesh + inc_side_m
Lsel,u,line,,all

*ENDDO

!Internal pins - SIDE 2
NSEL, S, LOC, X, - eps, esp
NSEL, A, LOC, X, x1 - eps, x1 + esp
NSEL, A, LOC, X, x2 - eps, x2 + esp
NSEL, R, LOC, Z, -S - eps, esp
NSEL, U, LOC, Y, -5, 5
NROTAT, ALL, LOCAL              ! Rotate all nodes to align with the local system
CPINTF,ux,eps_2
CPINTF,uy,eps_2
CPINTF,uz,eps_2
CPINTF,rotx,eps_2
CPINTF,roty,eps_2

! >>>>> SIDE 3 <<<<<

csys, 12

*DO, i, 1, N,1

K,600, 0 , - 3000, S
K,650, x2, 3000, 0

inc_side = 6*N*2
inc_K = (i-1)*6
inc_y = (i-1)*y2
inc_L = (i-1)*6
inc_mesh = (i-1)*4
inc_side_m = 4*N*2

K, 1 + inc_K + inc_side, 0 , 0  + inc_y, 0
K, 2 + inc_K + inc_side, x1, y1 + inc_y, 0
K, 3 + inc_K + inc_side, x2, y2 + inc_y, 0
L, 1 + inc_L + inc_side, 2 + inc_L + inc_side
L, 2 + inc_L + inc_side, 3 + inc_L + inc_side
LESIZE, all,E_length
LATT,1,,1,,650,,5
LMESH, 1 + inc_mesh + inc_side_m, 2 + inc_mesh + inc_side_m
Lsel,u,line,,all

K, 4 + inc_K + inc_side, x2, 0  + inc_y, S
K, 5 + inc_K + inc_side, x1, y1 + inc_y, S
K, 6 + inc_K + inc_side, 0 , y2 + inc_y, S
L, 4 + inc_L + inc_side, 5 + inc_L + inc_side
L, 5 + inc_L + inc_side, 6 + inc_L + inc_side
LESIZE, all,E_length
LATT,1,,1,,600,,5
LMESH, 3 + inc_mesh + inc_side_m, 4 + inc_mesh + inc_side_m
Lsel,u,line,,all

*ENDDO

!Internal pins - SIDE 3
NSEL, S, LOC, X, - eps, esp
NSEL, A, LOC, X, x1 - eps, x1 + esp
NSEL, A, LOC, X, x2 - eps, x2 + esp
NSEL, R, LOC, Z, -eps, S + esp
NSEL, U, LOC, Y, -5, 5
NROTAT, ALL, LOCAL              ! Rotate all nodes to align with the local system
CPINTF,ux,eps_2
CPINTF,uy,eps_2
CPINTF,uz,eps_2
CPINTF,rotx,eps_2
CPINTF,roty,eps_2

! >>>>> EDGE BLOCKS <<<<<

*DO, i, 1, N+1,1

csys, 0
K,3000 + 2*(i-1)    , 0  , y2*(i-1), -4-H/2
K,3000 + 2*(i-1) + 1, x2 , y2*(i-1), -4-H/2

csys, 11
K,3100 + 2*(i-1)    , 0  , y2*(i-1), 4+H/2
K,3100 + 2*(i-1) + 1, x2 , y2*(i-1), 4+H/2

csys, 12
K,3200 + 2*(i-1)    , 0  , y2*(i-1), -4-H/2
K,3200 + 2*(i-1) + 1, x2 , y2*(i-1), -4-H/2

L, 3000 + 2*(i-1), 3100 + 2*(i-1)
L, 3001 + 2*(i-1), 3200 + 2*(i-1)
L, 3101 + 2*(i-1), 3201 + 2*(i-1)

LESIZE, all,E_length
LATT,2,,1,,,,3
LMESH, all
Lsel,u,line,,all

*ENDDO

! >>>>> EDGE LINKS <<<<<

! Side 1 left node
csys, 0
KSEL,S,LOC,X,x2
KSEL,R,LOC,Y,y2
KSEL,R,LOC,Z,0
*GET, S1_L, KP, 0, NUM, MIN

! Side 1 right node
KSEL,S,LOC,X,0
KSEL,R,LOC,Y,y2
KSEL,R,LOC,Z,0
*GET, S1_R, KP, 0, NUM, MIN

! Side 2 left node
csys, 11
KSEL,S,LOC,X,x2
KSEL,R,LOC,Y,y2
KSEL,R,LOC,Z,0
*GET, S2_L, KP, 0, NUM, MIN

! Side 2 right node
KSEL,S,LOC,X,0
KSEL,R,LOC,Y,y2
KSEL,R,LOC,Z,0
*GET, S2_R, KP, 0, NUM, MIN

! Side 3 left node
csys, 12
KSEL,S,LOC,X,x2
KSEL,R,LOC,Y,y2
KSEL,R,LOC,Z,0
*GET, S3_L, KP, 0, NUM, MIN

! Side 3 right node
KSEL,S,LOC,X,0
KSEL,R,LOC,Y,y2
KSEL,R,LOC,Z,0
*GET, S3_R, KP, 0, NUM, MIN

allsel,all

*DO, i, 1, N,1

csys, 0
K,3300 + 2*(i-1)    , 0  , y2*i, -H/2
K,3300 + 2*(i-1) + 1, x2 , y2*i, -H/2

csys, 11
K,3400 + 2*(i-1)    , 0  , y2*i, H/2
K,3400 + 2*(i-1) + 1, x2 , y2*i, H/2

csys, 12
K,3500 + 2*(i-1)    , 0  , y2*i, -H/2
K,3500 + 2*(i-1) + 1, x2 , y2*i, -H/2

L, 3301 + 2*(i-1), S1_L + 6*(i-1)
L, 3400 + 2*(i-1), S2_R + 6*(i-1)
L, 3501 + 2*(i-1), S3_L + 6*(i-1)

*IF, i, LT, N, THEN

 L, 3300 + 2*(i-1), S1_R + 6*(i-1)
 L, 3401 + 2*(i-1), S2_L + 6*(i-1)
 L, 3500 + 2*(i-1), S3_R + 6*(i-1)

*ENDIF

TYPE, 2
LESIZE, all,E_length
LMESH, all
allsel,all

*ENDDO

L, 3300 + 2*(N-1)    , 6*N
L, 3400 + 2*(N-1) + 1, 6*N*2
L, 3500 + 2*(N-1)    , 6*N*3

TYPE, 2
LESIZE, all,E_length
LMESH, all
allsel,all

csys, 0
K,3300 + 2*N    , 0  , 0, -H/2
K,3300 + 2*N + 1, x2 , 0, -H/2

csys, 11
K,3400 + 2*N    , 0  , 0, H/2
K,3400 + 2*N + 1, x2 , 0, H/2

csys, 12
K,3500 + 2*N    , 0  , 0, -H/2
K,3500 + 2*N + 1, x2 , 0, -H/2

! First bottom edge
L, 3300 + 2*N, 1
L, 3400 + 2*N, 6*(N+1)-2

!Second bottom edge
L, 3400 + 2*N+1, 6*N+1
L, 3500 + 2*N+1, 2*N*6+4

! Third bottom edge
L, 3300 + 2*N+1, 4
L, 3500 + 2*N  , 2*N*6+1

TYPE, 2
LESIZE, all,E_length
LMESH, all
allsel,all

! Side 1 connections to edges
csys, 0
NSEL, S, LOC, Z, -H/2-4-eps, -H/2+eps
!NSEL, R, LOC, Y, 5, N*y2+5
NSEL, U, LOC, X, eps, x2-eps
NROTAT, ALL, LOCAL              ! Rotate all nodes to align with the local system
CPINTF,ux,eps_2
CPINTF,uy,eps_2
CPINTF,uz,eps_2
CPINTF,rotx,eps_2
CPINTF,roty,eps_2

! Side 2 connections to edges
csys, 11
NSEL, S, LOC, Z, H/2-eps, H/2+4+eps
!NSEL, R, LOC, Y, 5, N*y2+5
NSEL, U, LOC, X, eps, x2-eps
NROTAT, ALL, LOCAL              ! Rotate all nodes to align with the local system
CPINTF,ux,eps_2
CPINTF,uy,eps_2
CPINTF,uz,eps_2
CPINTF,rotx,eps_2
CPINTF,roty,eps_2

! Side 3 connections to edges
csys, 12
NSEL, S, LOC, Z, -4-H/2-eps, -H/2+eps
!NSEL, R, LOC, Y, 5, N*y2+5
NSEL, U, LOC, X, eps, x2-eps
NROTAT, ALL, LOCAL              ! Rotate all nodes to align with the local system
CPINTF,ux,eps_2
CPINTF,uy,eps_2
CPINTF,uz,eps_2
CPINTF,rotx,eps_2
CPINTF,roty,eps_2

! >>>>> SPIRAL LIFT <<<<<

csys, 13
k, 1000, 0, 0   , -195.053
k, 1001, 0, y2*N+PS, -195.053
K, 900,  0, 0, 0
L, 1000, 1001
LESIZE, all, E_length
LATT,2,,1,,900,,2
LMESH, all
Lsel,u,line,,all

NSEL, S, LOC, X, -eps, eps
NSEL, R, LOC, Z, -195.053 - eps, -195.053 + eps
NROTAT, ALL, LOCAL              ! Rotate all nodes to align with the local system

! >>>>> GET NUMBER OF EDGE NODES <<<<<

! Edge 1
csys,0
NSEL,S,LOC,X,x_shift
NSEL,R,LOC,Y,y2*N
NSEL,R,LOC,Z,z_shift
*GET, ED1, NODE, 0, NUM, MIN

! Edge 2
csys,11
NSEL,S,LOC,X,x2 - x_shift
NSEL,R,LOC,Y,y2*N
NSEL,R,LOC,Z,-z_shift
*GET, ED2, NODE, 0, NUM, MIN

! Edge 3
csys,12
NSEL,S,LOC,X,x_shift
NSEL,R,LOC,Y,y2*N
NSEL,R,LOC,Z,z_shift
*GET, ED3, NODE, 0, NUM, MIN

! Spiral lift
csys, 0
NSEL,S,LOC,X,168.92
NSEL,R,LOC,Y,N*y2+PS
NSEL,R,LOC,Z,-120.151
*GET, SL, NODE, 0, NUM, MIN  ! Spiral lift top node

allsel,all

! >>>>> TOP PLATE <<<<<

csys, 13
K, 2001, 60  , y2*N+PS, 28.847
K, 2002, 265 , y2*N+PS, -89.51
K, 2003, 325 , y2*N+PS, -193.433
K, 2004, 325 , y2*N+PS, -334.151
K, 2005, 225 , y2*N+PS, -434.053
K, 2006, -225, y2*N+PS, -434.053
K, 2007, -325, y2*N+PS, -334.151
K, 2008, -325, y2*N+PS, -193.433
K, 2009, -265, y2*N+PS, -89.51
K, 2010, -60 , y2*N+PS, 28.847

! Create the keypoints of the kassow base
K, 2020, 80, y2*N+PS, -10
K, 2021, 80, y2*N+PS, -180
K, 2022, -80, y2*N+PS, -180
K, 2023, -80, y2*N+PS, -10

! Create the keypoints for better mesh
K, 2024, 80  , y2*N+PS, 0
K, 2025, 80, y2*N+PS, -195.053
K, 2026, -80, y2*N+PS, -195.053
K, 2027, -80, y2*N+PS, 0

! Create a keypoint on edge 1
csys, 0
*GET, NX, NODE, ED1, LOC, X   ! Get X coordinate of edge 1
*GET, NZ, NODE, ED1, LOC, Z   ! Get Z coordinate of edge 1
K, 2011, NX, y2*N+PS, NZ
K, 2111, NX, y2*N, NZ
K, 2211, NX, y2*N+PS, NZ

! Create a keypoint on edge 2
csys, 11
*GET, NX, NODE, ED2, LOC, X   ! Get X coordinate of edge 1
*GET, NZ, NODE, ED2, LOC, Z   ! Get Z coordinate of edge 1
K, 2013, NX, y2*N+PS, NZ
K, 2113, NX, y2*N, NZ
K, 2213, NX, y2*N+PS, NZ

! Create a keypoint on edge 3
csys, 12
*GET, NX, NODE, ED3, LOC, X   ! Get X coordinate of edge 1
*GET, NZ, NODE, ED3, LOC, Z   ! Get Z coordinate of edge 1
K, 2012, NX, y2*N+PS, NZ
K, 2112, NX, y2*N, NZ
K, 2212, NX, y2*N+PS, NZ

! Create elements between top plate and edges
L,2111,2211
L,2113,2213
L,2112,2212

TYPE, 2
LESIZE, all,E_length
LMESH, all
allsel,all

! Edge 1 constraint  -----------------------------------------------------------------------------------------------------------------------------------

csys, 0
*GET, NX, NODE, ED1, LOC, X   ! Get X coordinate of edge 1
*GET, NZ, NODE, ED1, LOC, Z   ! Get Z coordinate of edge 1

NSEL, S, LOC, Y, y2*N
NSEL, R, LOC, X, NX
NSEL, R, LOC, Z, NZ
NROTAT, ALL, LOCAL              ! Rotate all nodes to align with the local system
NSEL, U, NODE, , ED1  		! Remove the target node ED1 from the selection

*GET, CLOSEST_NODE, NODE,  0, NUM, MAX  ! Get the highest node number in the selection
allsel,all

csys, 0
CP, NEXT, ALL  , ED1, CLOSEST_NODE

! Edge 2 constraint  -----------------------------------------------------------------------------------------------------------------------------------

*GET, NX, NODE, ED2, LOC, X   ! Get X coordinate of edge 2
*GET, NZ, NODE, ED2, LOC, Z   ! Get Z coordinate of edge 2

NSEL, S, LOC, Y, y2*N
NSEL, R, LOC, X, NX
NSEL, R, LOC, Z, NZ
csys, 11
NROTAT, ALL, LOCAL              ! Rotate all nodes to align with the local system
NSEL, U, NODE, , ED2  		! Remove the target node ED1 from the selection

*GET, CLOSEST_NODE, NODE,  0, NUM, MAX  ! Get the highest node number in the selection
allsel,all

csys, 11
CP, NEXT, ALL  , ED2, CLOSEST_NODE

! Edge 3 constraint  -----------------------------------------------------------------------------------------------------------------------------------

*GET, NX, NODE, ED3, LOC, X   ! Get X coordinate of edge 3
*GET, NZ, NODE, ED3, LOC, Z   ! Get Z coordinate of edge 3

NSEL, S, LOC, Y, y2*N
NSEL, R, LOC, X, NX
NSEL, R, LOC, Z, NZ
csys, 0
NROTAT, ALL, LOCAL              ! Rotate all nodes to align with the local system
NSEL, U, NODE, , ED3  		! Remove the target node ED1 from the selection

*GET, CLOSEST_NODE, NODE,  0, NUM, MAX  ! Get the highest node number in the selection
allsel,all

csys, 0
CP, NEXT, ALL  , ED3, CLOSEST_NODE

! >>>>> GET NUMBER OF TOP EDGE NODES <<<<<

! Edge 1
csys,0
NSEL,S,LOC,X,x_shift
NSEL,R,LOC,Y,y2*N+PS
NSEL,R,LOC,Z,z_shift
*GET, ED1T, NODE, 0, NUM, MIN

! Edge 2
csys,11
NSEL,S,LOC,X,x2 - x_shift
NSEL,R,LOC,Y,y2*N+PS
NSEL,R,LOC,Z,-z_shift
*GET, ED2T, NODE, 0, NUM, MIN

! Edge 3
csys,12
NSEL,S,LOC,X,x_shift
NSEL,R,LOC,Y,y2*N+PS
NSEL,R,LOC,Z,z_shift
*GET, ED3T, NODE, 0, NUM, MIN

allsel,all

! Keypoint on the spiral lift: 1001

! Create another keypoint on top of the spiral lift
CSYS, 13
*GET, KX, KP, 1001, LOC, X   ! Get X coordinate of top spiral lift
*GET, KZ, KP, 1001, LOC, Z   ! Get Z coordinate of top spiral lift
K, 2016, KX, y2*N+PS, KZ

! Area 1
A,2001,2024,2011,2027,2010

! Area 2
A,2001,2002,2003,2004,2012,2021,2020,2024

! Area 3
A,2004,2005,2012

! Area 4
A,2005,2006,2013,2022,2026,2016,2025,2021,2012

! Area 5
A,2006,2007,2013

! Area 6
A,2007,2008,2009,2010,2027,2023,2022,2013

! Area 7
A,2011,2024,2020,2023,2027

! Area 8
A,2020,2021,2022,2023

! Area 9
A,2021,2025,2016,2026,2022

! Mesh the area with shell elements
TYPE, 3
MAT, 1
ESIZE,E_plate
secn, 4
AMESH,ALL
allsel,all

! TOP PLATE CONSTRAINTS

! TOP Edge 1 constraint  -----------------------------------------------------------------------------------------------------------------------------------

csys, 0
*GET, NX, NODE, ED1T, LOC, X   ! Get X coordinate of edge 1
*GET, NZ, NODE, ED1T, LOC, Z   ! Get Z coordinate of edge 1

NSEL, S, LOC, Y, y2*N+PS
NSEL, R, LOC, X, NX
NSEL, R, LOC, Z, NZ
NROTAT, ALL, LOCAL              ! Rotate all nodes to align with the local system
NSEL, U, NODE, , ED1T 				! Remove the target node ED1 from the selection

*GET, CLOSEST_NODE, NODE,  0, NUM, MAX  ! Get the highest node number in the selection
allsel,all

csys, 0
CP, NEXT, ux  , ED1T, CLOSEST_NODE
CP, NEXT, uy  , ED1T, CLOSEST_NODE
CP, NEXT, uz  , ED1T, CLOSEST_NODE
CP, NEXT, rotx, ED1T, CLOSEST_NODE
CP, NEXT, roty, ED1T, CLOSEST_NODE
CP, NEXT, rotz, ED1T, CLOSEST_NODE

! TOP Edge 2 constraint  -----------------------------------------------------------------------------------------------------------------------------------

*GET, NX, NODE, ED2, LOC, X   ! Get X coordinate of edge 2
*GET, NZ, NODE, ED2, LOC, Z   ! Get Z coordinate of edge 2

NSEL, S, LOC, Y, y2*N+PS
NSEL, R, LOC, X, NX
NSEL, R, LOC, Z, NZ
csys, 11
NROTAT, ALL, LOCAL              ! Rotate all nodes to align with the local system
NSEL, U, NODE, , ED2  				! Remove the target node ED1 from the selection

*GET, CLOSEST_NODE, NODE,  0, NUM, MAX  ! Get the highest node number in the selection
allsel,all

csys, 11
CP, NEXT, uy  , ED2T, CLOSEST_NODE
CP, NEXT, uz  , ED2T, CLOSEST_NODE
CP, NEXT, rotx, ED2T, CLOSEST_NODE
CP, NEXT, roty, ED2T, CLOSEST_NODE
CP, NEXT, rotz, ED2T, CLOSEST_NODE

! TOP Edge 3 constraint  -----------------------------------------------------------------------------------------------------------------------------------

*GET, NX, NODE, ED3, LOC, X   ! Get X coordinate of edge 3
*GET, NZ, NODE, ED3, LOC, Z   ! Get Z coordinate of edge 3

NSEL, S, LOC, Y, y2*N+PS
NSEL, R, LOC, X, NX
NSEL, R, LOC, Z, NZ
csys, 0
NROTAT, ALL, LOCAL              ! Rotate all nodes to align with the local system
NSEL, U, NODE, , ED3  				! Remove the target node ED1 from the selection

*GET, CLOSEST_NODE, NODE,  0, NUM, MAX  ! Get the highest node number in the selection
allsel,all

csys, 0
CP, NEXT, uy  , ED3T, CLOSEST_NODE
CP, NEXT, uz  , ED3T, CLOSEST_NODE
CP, NEXT, rotx, ED3T, CLOSEST_NODE
CP, NEXT, roty, ED3T, CLOSEST_NODE
CP, NEXT, rotz, ED3T, CLOSEST_NODE

! Spiral lift constraint  -----------------------------------------------------------------------------------------------------------------------------------

*GET, NX, NODE, SL, LOC, X   ! Get X coordinate of node SL
*GET, NZ, NODE, SL, LOC, Z   ! Get Z coordinate of node SL

NSEL, S, LOC, Y, y2*N+PS
NSEL, R, LOC, X, NX
NSEL, R, LOC, Z, NZ
csys, 0
NROTAT, ALL, LOCAL              ! Rotate all nodes to align with the local system
NSEL, U, NODE, , SL  				! Remove the target node ED1 from the selection

*GET, CLOSEST_NODE, NODE,  0, NUM, MAX  ! Get the highest node number in the selection
allsel,all

csys, 0
CP, NEXT, ux  , SL, CLOSEST_NODE
CP, NEXT, uy  , SL, CLOSEST_NODE
CP, NEXT, uz  , SL, CLOSEST_NODE

! Rotate the bottom nodes for constraints

csys, 12
NSEL, S, LOC, Z, z_shift - eps*5, z_shift + eps*5
NSEL, R, LOC, X, x_shift - eps*5, x_shift + eps*5
NSEL, R, LOC, y, -eps, eps
csys, 0
NROTAT, ALL, LOCAL              ! Rotate all nodes to align with the local system

csys, 12
NSEL, S, LOC, Z, z_shift - eps*5, z_shift + eps*5
NSEL, R, LOC, X, x2 - x_shift - eps*5, x2 - x_shift + eps*5
NSEL, R, LOC, y, -eps, eps
csys, 11
NROTAT, ALL, LOCAL              ! Rotate all nodes to align with the local system

allsel,all

! Rotate the nodes where applying the load
CSYS, 13
NSEL, S, LOC, Y, y2*N+PS-eps, y2*N+PS+eps
NSEL, R, LOC, X, -80, 80
NSEL, R, LOC, Z, -10, -180
CSYS, 14
NROTAT, ALL, LOCAL              ! Rotate all nodes to align with the local system

Fini

/SOLUTION
ANTYPE, STATIC, NEW   !static solution

NLGEOM,ON

! >>>>> EXTERNAL CONSTRAINTS <<<<<

! Bottom first edge constraints
csys, 0
NSEL, S, LOC, Z, z_shift - eps*5, z_shift + eps*5
NSEL, R, LOC, X, x_shift - eps*5, x_shift + eps*5
NSEL, R, LOC, Y, - eps, eps
D,ALL,ALL

! Bottom second edge constraints
csys, 12
NSEL, S, LOC, Z, z_shift - eps*5, z_shift + eps*5
NSEL, R, LOC, X, x2 - x_shift - eps*5, x2 - x_shift + eps*5
NSEL, R, LOC, Y, - eps, eps
D, ALL, uy
D, ALL, uz
D, ALL, rotx
D, ALL, roty
D, ALL, rotz

! Bottom third edge constraints
csys, 12
NSEL, S, LOC, Z, z_shift - eps*5, z_shift + eps*5
NSEL, R, LOC, X, x_shift - eps*5, x_shift + eps*5
NSEL, R, LOC, Y, - eps, eps
D, ALL, uy
D, ALL, uz
D, ALL, rotx
D, ALL, roty
D, ALL, rotz

! Bottom side spiral lift constraint
csys, 0
NSEL,S,LOC,X,168.92
NSEL,R,LOC,Y,0
NSEL,R,LOC,Z,-120.151
*GET, SL_BOTTOM, NODE, 0, NUM, MIN  ! Spiral lift bottom node
D, ALL, ux
D, ALL, uy
D, ALL, uz
D, ALL, roty

! >>>>> FORCES AND MOMENTS <<<<<

csys, 13
NSEL, S, LOC, Z, -10, -180
NSEL, R, LOC, Y, y2*N+PS-eps, y2*N+PS+eps
NSEL, R, LOC, X, -80, 80

csys, 14
*GET, N_node, NODE, 0, COUNT  ! Get the total number of selected nodes
!F, All, FY, (-F_KASSOW-W_KASSOW) / N_node
!F, All, MZ, (F_KASSOW*L_KASSOW+W_KASSOW*C_KASSOW) / N_node
F, All, FY, -F_DS / N_node
F, All, MZ, M_DS / N_node

/eshape,1

!Gravitational acceleration
Acel,,9.81	!m/s2

allsel,all
outres,all,all

solve
fini

/post1
set,last
